// COMSOL Multiphysics 5.6.0.401 model "Nano_Sensor_Plasmon.mph"
// Outline of the model tree

Parameters
  lda0 = 1[um]  // Wavelength
  k0 = 2*pi/lda0  // Vacuum wave number
  n = 1.5  // Refractive index in waveguide
  k = k0*n  // Wave number in waveguide
  theta = 10[deg]  // Incidence angle
  k1x = k*sin(theta)  // Wave vector, first wave, y-component
  d = 350[um]  // Waveguide width
  L = 5*4*d/2/tan(theta)  // Waveguide length
  w0 = 75[um]  // Beam radius

Geometry
  geom1 "Geometry 1" (2D, length unit nm)
    r1: Rectangle | pos = {0, -d/2}; size = {L, d}
    fin: Finalize "Form Union"

Materials
  mat1: Common "Material 1" on all domains
    RefractiveIndex
      n = n
      ki = 0

Physics
  ewt: ElectromagneticWavesTransient on all domains
    dependent variable A = {k1x, k1y, Az}
    components.components = outofplane
    wee1: WaveEquationElectric (default)
    pec1: PerfectElectricConductor (default)
    init1: init "Initial Values 1" (default)
    pec2: PerfectElectricConductor on boundaries 1
    mfb1: MagneticFieldBoundary "Magnetic Field 1" on boundaries 2, 3

Mesh
  mesh1 "Mesh 1" (physics-controlled)

Studies
  std1 "Study 1"
    eig: Eigenfrequency | shift = c_const/1[um]; conrad = 1
  std2 "Study 2"
    time: Transient "Time Dependent" | tlist = range(0,0.1,1)
  std3 "Study 3"
    time: Transient "Time Dependent" | tlist = range(0,0.1,1); initialtime = 0
    tffft: TimeToFreqFFT "Time to Frequency FFT"
      linpstudy = current
      fftstarttime = 0
      fftendtime = 1
      fftmaxfreq = 10
      fftwincutoff = 1
      fftwinminfw = 0
      fftwinmaxfw = 1
    cmbsol: CombineSolution "Combine Solutions" | soloper = remsol; excmethod = implicit; remsolfromexprexc = 0

Solver configurations
  sol1 "Solution 1" (study std1)
    v1: Variables "Dependent Variables 1"
    e1: Eigenvalue "Eigenvalue Solver 1"
      d1: Direct "Suggested Direct Solver (ewt)" | linsolver = pardiso

Datasets
  dset1: Solution | solution = sol1

Plots
  pg1: PlotGroup2D "2D Plot Group 1" | data = dset1
    surf1: Surface "Surface Plasmon Resonance-SPR" | expr = ewt.normE